// SBML level 2 version 4

model zzz()

  // Compartments:
  compartment comp1 = 1.1 _litre;

  // Species:
  substanceOnly species s1 in comp1 = 12;  // substance in _mole
  species s2 in comp1 = 1;  // substance in _mole
  species $s3 in comp1;  // substance in _mole

  // Parameters:
  x1 has _mole2__litre;
  x2 has _hour;
  k1 = 0.001 __mole__hour;
  tau = 12 _hour;
  s3_0 = 15 _mole__litre;
  // Time in days
  tid has _day;

  // Assignment rules:
  s3 := s3_0*exp(time/tau);
  x1 := s1*s2;
  x2 := time/2;
  tid := 0.041667*time + 0;

  // Reactions:
  r1: s1 -> s2; k1*s1^2;

  // Unit definitions:
  unit _hour = 3600 second;
  unit _litre = litre;
  unit _mole = mole;
  unit _mole__hour = mole / (3600 second); _mole__hour is "mole/hour";
  unit _day = 86400 second;
  unit __mole__hour = 1 / (3600 second * mole); __mole__hour is "1/hour/mole";
  unit _mole__litre = mole / litre; _mole__litre is "mole/litre";
  unit _mole2__litre = mole^2 / litre; _mole2__litre is "mole^2/litre";
end
