// SBML level 2 version 4

function pow7(x, y)
  2*x*x^7;
end

function xx(x, y)
  x^8 + pow7(x, 1);
end

function xxx(x, y)
  sin(x)*(y*1.2)^3*cos(x);
end

function yyy(x, y)
  1 + sin(x) + y^3 + cos(x);
end

function zzz(x, y)
  xxx(y, x);
end

model nameless()

  // Compartments:
  compartment c1 = 3 _L;
  compartment c2 = 4 _mL;
  compartment c3 = 5 _m;

  // Species:
  species s1 in c1 = 10;  // substance in _mM_L
  species s2 in c2 = 10;  // substance in _mM_mL
  species s3 in c3 = 10;  // substance in _mmole

  // Parameters:
  p1 = 1 _uM;
  p2 has _mM_h7;
  y21 has _metre3;
  y22 has _metre3;
  k1 = 0.001 __h;
  k2 = 1.1 _UL;
  k21 = 1 _metre;
  k22 = 1 _mole;

  // Assignment rules:
  p2 := 23*s1/xx(k1, 3);
  y21 := k21^3 + xxx(1.1*2.2, k21);
  y22 := k21^3 + zzz(k21, 3.1415);

  // Reactions:
  r1: s1 => s2; k1*s1*c1;

  // Unit definitions:
  unit _h = 3600 second;
  unit _uM = 1e-6 mole / litre;
  unit _L = litre;
  unit _mL = 1e-3 litre;
  unit _m = metre;
  unit _mM_L = 1e-3 mole; _mM_L is "mM*L";
  unit _mM_mL = 1e-3 mole * 1e-3 dimensionless; _mM_mL is "mM*mL";
  unit _mmole = 1e-3 mole;
  unit _mmole__h = 1e-3 mole / (3600 second); _mmole__h is "mmole/h";
  unit _mM_h7 = 1e-3 mole * (3600 second)^7 / litre; _mM_h7 is "mM*h^7";
  unit __h = 1 / (3600 second); __h is "1/h";
  unit _UL = dimensionless;
  unit _metre = metre;
  unit _mole = mole;
  unit _metre3 = metre^3; _metre3 is "metre^3";
end
