// SBML level 2 version 4

model main()

  // Compartments:
  // This is just text. italic, bold
  // another line
  compartment comp1 = x*y; comp1 has L; comp1 is "This is compartment";
  compartment comp2 = 3.2;

  // Species:
  species s1 in comp3 = 1.1;
  species $s2_title in comp1;

  // Parameters:
  p2 = 15.223 nm__min__fM;
  p3 has __h__L;
  evt1 has min;

  // Assignment rules:
  // (no variable named) := xxx*yyy;
  s2 title := x*y;
  // (no variable named) := t - 12;

  // Reactions:
  r2: 2 s4 -> $s2_title; p2*comp1*s1;
  r3: -> ; 28;  // modifiers: s2_title

  // Events:
  at (evt1 >= 0):  = s1 + 2;

  // Unit definitions:
  unit L = litre;
  unit nm__min__fM = litre * 1e-9 metre / (60 second * 1e-15 mole); nm__min__fM is "1 / min / fM·nm";
  unit __h__L = 1 / (litre * 3600 second); __h__L is "1 / L / h";
  unit mole__L = mole / litre; mole__L is "mole / L";
  unit min = 60 second;
end
