// SBML level 2 version 4

model two_comp()

  // Compartments:
  compartment c0 = 1 L;
  compartment c1 = 5 L;
  compartment c2 = 1.5 L;

  // Species:
  substanceOnly species a0 in c0 = a0_0;  // substance in umole
  species s1 in c1 = 0;  // substance in uM_L
  species s2 in c2 = 0;  // substance in uM_L

  // Parameters:
  auc = 0 uM_h;
  evt1 has h;

  // Assignment rules:
  evt1 := t - 12;

  // Rate rules:
  auc' = s1;

  // Reactions:
  r1: a0 -> s1; kabs*a0;
  r2: s1 -> s2; kdiff*PS*(s1 - s2);
  r3: s1 -> ; kel*s1*c1;

  // Events:
  sw1: at (evt1 >= 0): a0 = 10;

  // Unit definitions:
  unit L = litre;
  unit umole = 1e-6 mole;
  unit uM_L = 1e-6 mole; uM_L is "uM*L";
  unit uM_h = 1e-6 mole * 3600 second / litre; uM_h is "uM*h";
  unit h = 3600 second;
end
